Vinmax := 47  # V  # Максимальное входное напряжение
Vinmin := 15  # V  # Минимальное входное напряжение
Vin := 42  # V  # Номинальное входное напряжение
Vout := 12.5  # V  # Выходное напряжение
Iout := 5  # A  # Максимальный выходной ток
Rdc := 0.011  # Ohm  # Сопротивление дросселя
Vd := 0.7  # V  # Падение напряжение диода
Rdson := 0.092  # Ohm  # Сопротивление ключа в открытом состоянии
Ton := 1.35e-7  # s  # Время включения
Icl := 6  # A  # Ограничение тока
Voutsc := 0.1  # V  # Выходное напряжение во время короткого замыкания
ΔVout := 4 %*Vout = 0.5
Ioh := 3.75  # A
Iol := 1.25  # A
ΔIout := Ioh - Iol = 2.5
Vf := Vout + ΔVout = 13
Voripple := 0.5 %*Vout = 0.0625
# ВЫБОР ЧАСТОТЫ
fswmaxskipt := 1/Ton*((Iout*Rdc + Vout + Vd)/(Vinmax - Iout*Rdson + Vd)) = 2078433  # Hz
fswshift := 8/Ton*((Icl*Rdc + Voutsc + Vd)/(Vinmax - Icl*Rdson + Vd)) = 1088456  # Hz
fsw := 800000  # Hz  # Частота
Kind := 0.3
Rt := 101756/(fsw/1000)^1.008 = 120.572  # Kohm  # R3
# ВЫБОР ДРОССЕЛЯ
Lomin := (Vinmax - Vout)/(Iout*Kind)*Vout/(Vinmax*fsw) = 7.64628e-6  # H
Lo := 2.2*10^-5  # H  # Дроссель
Iripple := Vout*(Vinmax - Vout)/(Vinmax*Lo*fsw) = 0.521337  # A
Ilrms := sqrt(Iout^2 + 1/12*(Vout*(Vinmax - Vout)/(Vinmax*Lo*fsw))^2) = 5.00226  # A
Ilpeak := Iout + Iripple/2 = 5.26067  # A
# ВЫБОР ВЫХОДНОЙ ЕМКОСТИ
Cout1 := 2*ΔIout/(fsw*ΔVout) = 1.25e-5  # F
Cout2 := Lo*(Ioh^2 - Iol^2)/(Vf^2 - Vout^2) = 2.15686e-5  # F
Cout3 := 1/(8*fsw)*1/(Voripple/Iripple) = 1.30334e-6  # F
Cout := 4.4*10^-5  # F
Resr1 := Voripple/Iripple = 0.119884  # Ohm
Icoutrms := Vout*(Vinmax - Vout)/(sqrt(12)*Vinmax*Lo*fsw) = 0.150497  # A
# МОЩНОСТЬ ДИОДА
Cj := 3*10^-10
Pd := (Vinmax - Vout)*Iout*Vd/Vinmax + Cj*fsw*(Vinmax + Vd)^2/2 = 2.84218  # W
# ВХОДНАЯ ЕМКОСТЬ
Icirms := Iout*sqrt(Vout/Vinmin*(Vinmin - Vout)/Vinmin) = 1.86339  # A
Cin := 1*10^-5  # F
ΔVin := Iout*0.25/(Cin*fsw) = 0.15625  # V
# Гистерезис напряжения
Vstart := 6.5  # V
Vstop := 5  # V
Ihys := 0.0000034  # A
Ven := 1.2  # V
Ruvlo1 := (Vstart - Vstop)/Ihys = 441176  # Ohm
Ruvlo2 := Ven/((Vstart - Ven)/Ruvlo1) = 99889  # Ohm
# Делитель обратной связи
Rls := 1500  # Ohm
Rhs := Rls*(Vout - 0.8)/0.8 = 21937.5  # Ohm
# Расчет ебучих трех компонентов
Resr2 := 0.01
gmps := 17
Vref := 0.8
gmea := 0.00035
Fpmod := Iout/(2*π*Vout*Cout) = 1446.86  # Hz
Fzmod := 1/(2*π*Resr2*Cout) = 361716  # Hz
Fco1 := sqrt(Fpmod*Fzmod) = 22876.9
Fco2 := sqrt(Fpmod*fsw/2) = 24057.1
Fco := sqrt(Fco1*Fco2) = 23459.6
R4 := (2*π*Fco*Cout/gmps)*(Vout/(Vref*gmea)) = 17031.6  # Ohm
C5 := 1/(2*π*R4*Fpmod) = 6.45857e-9  # F
C8_1 := Cout*Resr2/R4 = 2.58343e-11
C8_2 := 1/(R4*fsw*π) = 2.33617e-11
C8 := 4.731*10^-11
